*Heading
** Job name: biaxial_job0 Model name: biaxial
** Generated by: Abaqus/CAE 6.14-3
*Preprint, echo=NO, model=NO, history=NO, contact=NO
**
** PARTS
**
*Part, name=square
*Node
      1,           0.,           0.,           0.
      2,         0.25,           0.,           0.
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*Element, type=S4R
  1,   1,   2,  23,  22
  2,   2,   3,  24,  23
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*Nset, nset=square, generate
   1,  441,    1
*Elset, elset=square, generate
   1,  400,    1
*Nset, nset=symm_X, generate
   1,  421,   21
*Elset, elset=symm_X, generate
   1,  381,   20
*Nset, nset=symm_Y, generate
  1,  21,   1
*Elset, elset=symm_Y, generate
  1,  20,   1
*Elset, elset=_back_face_SNEG, internal, generate
   1,  400,    1
*Surface, type=ELEMENT, name=back_face
_back_face_SNEG, SNEG
*Elset, elset=_surf_X_E2, internal, generate
  20,  400,   20
*Surface, type=ELEMENT, name=surf_X
_surf_X_E2, E2
*Elset, elset=_surf_Y_E3, internal, generate
 381,  400,    1
*Surface, type=ELEMENT, name=surf_Y
_surf_Y_E3, E3
*Orientation, name=Ori-1
          1.,           0.,           0.,           0.,           1.,           0.
3, 45.
0.6921,0.7218,0.0
0.6921,-0.7218,0.0
** Section: section_shell
*Shell Section, elset=square, material=polymer, orientation=Ori-1, offset=SPOS
0.2, 5
*End Part
**
**
** ASSEMBLY
**
*Assembly, name=Assembly
**
*Instance, name=square-1, part=square
*End Instance
**
*End Assembly
*Amplitude, name=amp_x
             0.,              0.,            0.05,            0.05,             0.1,             0.1,             0.2,             0.2
            0.3,             0.3,             0.4,             0.4,             0.5,             0.5,             0.6,             0.6
            0.7,             0.7,             0.8,             0.8,             0.9,             0.9,              1.,              1.
*Amplitude, name=amp_y
             0.,              0.,            0.05,            0.05,             0.1,             0.1,             0.2,             0.2
            0.3,             0.3,             0.4,             0.4,             0.5,             0.5,             0.6,             0.6
            0.7,             0.7,             0.8,             0.8,             0.9,             0.9,              1.,              1.
**
** MATERIALS
**
*Material, name=polymer
*Anisotropic Hyperelastic, holzapfel, local direction=2
 0.016,    2.5, 0.272,  92.3, 0.215
** ----------------------------------------------------------------
**
** STEP: Step-1
**
*Step, name=Step-1, nlgeom=YES
*Static
0.01, 1., 1e-05, 1.
**
** BOUNDARY CONDITIONS
**
** Name: x_symm Type: Symmetry/Antisymmetry/Encastre
*Boundary
square-1.symm_X, XSYMM
** Name: y_symm Type: Symmetry/Antisymmetry/Encastre
*Boundary
square-1.symm_Y, YSYMM
** Name: z_symm Type: Symmetry/Antisymmetry/Encastre
*Boundary
square-1.square, ZSYMM
**
** LOADS
**
** Name: x_load   Type: Shell edge load
*Dsload, amplitude=amp_x, follower=NO, constant resultant=YES
square-1.surf_X, EDLD, 0.09, 1., 0., 0.
** Name: y_load   Type: Shell edge load
*Dsload, amplitude=amp_y, follower=NO, constant resultant=YES
square-1.surf_Y, EDLD, 0.09, 0., 1., 0.
**
** OUTPUT REQUESTS
**
*Restart, write, frequency=0
**
** FIELD OUTPUT: F-Output-1
**
*Output, field, variable=PRESELECT
**
** HISTORY OUTPUT: H-Output-1
**
*Output, history, variable=PRESELECT
*End Step
